<?xml version="1.0" encoding="ISO-8859-1"?>
<neuroml xmlns="http://www.neuroml.org/schema/neuroml2" xmlns:xsi="http://www.w3.org/2001/XMLSchema-instance" xsi:schemaLocation="http://www.neuroml.org/schema/neuroml2 https://raw.github.com/NeuroML/NeuroML2/development/Schemas/NeuroML2/NeuroML_v2beta4.xsd" id="Km_CML">

    <notes>ChannelML file containing a single Channel description</notes>

    <ionChannel id="Km_CML" conductance="10pS" type="ionChannelHH" species="k">

        <notes>ChannelML file containing a single Channel description</notes>

        <annotation>
            <rdf:RDF xmlns:rdf="http://www.w3.org/1999/02/22-rdf-syntax-ns#">
                <rdf:Description rdf:about="Km_CML">

                    <bqmodel:isDescribedBy xmlns:bqmodel="http://biomodels.net/model-qualifiers/">
                        <rdf:Bag>
                            <rdf:li>....</rdf:li>
                            <rdf:li rdf:resource="..."/>
                        </rdf:Bag>
                    </bqmodel:isDescribedBy>

                    <bqbiol:isVersionOf xmlns:bqbiol="http://biomodels.net/biology-qualifiers/">
                        <rdf:Bag>
                            <rdf:li>K channels</rdf:li>
                            <rdf:li rdf:resource="http://senselab.med.yale.edu/senselab/NeuronDB/channelGene2.htm#table3"/>
                        </rdf:Bag>
                    </bqbiol:isVersionOf>

                </rdf:Description>
            </rdf:RDF>
        </annotation>

        <gate id="p" type="gateHHtauInf" instances="1">
            <timeCourse type="Km_CML_p_tau_tau"/>
            <steadyState type="Km_CML_p_inf_inf"/>
        </gate>

    </ionChannel>

    <ComponentType name="Km_CML_p_tau_tau" extends="baseVoltageDepTime">
        <Constant name="TIME_SCALE" dimension="time" value="1 ms"/>
        <Constant name="VOLT_SCALE" dimension="voltage" value="1 mV"/>
        <Constant name="tmax" dimension="none" value="1000">
            <!--Note: this parameter should instead be defined only once within the ionChannel!-->
        </Constant>

        <Dynamics>
            <DerivedVariable name="V" dimension="none" value="v / VOLT_SCALE"/>
            <DerivedVariable name="t" exposure="t" dimension="time" value="(tmax / ( (3.3 * (exp ((V+35)/20))) + (exp (-1 * (V+35) /20)))) * TIME_SCALE"/>
        </Dynamics>

    </ComponentType>

    <ComponentType name="Km_CML_p_inf_inf" extends="baseVoltageDepVariable">
        <Constant name="TIME_SCALE" dimension="time" value="1 ms"/>
        <Constant name="VOLT_SCALE" dimension="voltage" value="1 mV"/>
        <Constant name="tmax" dimension="none" value="1000">
            <!--Note: this parameter should instead be defined only once within the ionChannel!-->
        </Constant>

        <Dynamics>
            <DerivedVariable name="V" dimension="none" value="v / VOLT_SCALE"/>
            <DerivedVariable name="x" exposure="x" dimension="none" value="1/(1+ (exp (-1 * (V+35)/10)))"/>
        </Dynamics>

    </ComponentType>

</neuroml>
