<Lems xmlns="http://www.neuroml.org/lems/0.7.2"
    xmlns:xsi="http://www.w3.org/2001/XMLSchema-instance"
    xsi:schemaLocation="http://www.neuroml.org/lems/0.7.2 https://raw.githubusercontent.com/LEMS/LEMS/development/Schemas/LEMS/LEMS_v0.7.2.xsd">

    <Target component="sim1" reportFile="simulator.props" timesFile="time.dat"/>

    <!--Include standard NeuroML 2 ComponentType definitions-->

    <Include file="Cells.xml"/>
    <Include file="Networks.xml"/>
    <Include file="Simulation.xml"/>

    <Include file="FiveCells.net.nml"/>

    <Component type="Simulation" id="sim1" length="2700.0ms" step="0.01ms" target="FiveCells">

        <Display id="CG_RS_v" title="RS cell" xmin="-100" xmax="2800" ymin="-100" ymax="70" timeScale="1ms">
            <Line id="v" timeScale="1 ms" quantity="CG_RS/0/RS/v" scale="1 mV" color="#000000"/>
        </Display>

        <Display id="CG_FS_v" title="FS cell" xmin="-100" xmax="2800" ymin="-100" ymax="70" timeScale="1ms">
            <Line id="v" timeScale="1 ms" quantity="CG_FS/0/FS/v" scale="1 mV" color="#000000"/>
        </Display>

        <Display id="CG_IB_v" title="IB cell" xmin="-100" xmax="2800" ymin="-100" ymax="70" timeScale="1ms">
            <Line id="v" timeScale="1 ms" quantity="CG_IB/0/IB/v" scale="1 mV" color="#000000"/>
        </Display>

        <Display id="CG_IBR_v" title="IBR cell" xmin="-100" xmax="2800" ymin="-100" ymax="70" timeScale="1ms">
            <Line id="v" timeScale="1 ms" quantity="CG_IBR/0/IBR/v" scale="1 mV" color="#000000"/>
        </Display>

        <Display id="CG_LTS_v" title="LTS cell" xmin="-100" xmax="2800" ymin="-100" ymax="70" timeScale="1ms">
            <Line id="v" timeScale="1 ms" quantity="CG_LTS/0/LTS/v" scale="1 mV" color="#000000"/>
        </Display>

        <Display id="rates" title="PospischilEtAl2008: channel variables" xmin="-100" xmax="1100" ymin="-.1" ymax="1.1" timeScale="1ms">
            <Line id="Na m" timeScale="1 ms" quantity="CG_RS/0/RS/biophys/membraneProperties/Na_all/Na/m/q" scale="1" color="#000000"/>
            <Line id="Na h" timeScale="1 ms" quantity="CG_RS/0/RS/biophys/membraneProperties/Na_all/Na/h/q" scale="1" color="#FF0000"/>
            <Line id="Kd n" timeScale="1 ms" quantity="CG_RS/0/RS/biophys/membraneProperties/Kd_all/Kd/n/q" scale="1" color="#00FF00"/>
            <Line id="IM p" timeScale="1 ms" quantity="CG_RS/0/RS/biophys/membraneProperties/IM_all/IM/p/q" scale="1" color="#0000FF"/>
        </Display>

        <OutputFile id="CG_RS_v_0_0_OF" fileName="Five.dat">
            <OutputColumn id="0" quantity="CG_RS/0/RS/v"/>
            <OutputColumn id="1" quantity="CG_FS/0/FS/v"/>
            <OutputColumn id="2" quantity="CG_IB/0/IB/v"/>
            <OutputColumn id="3" quantity="CG_IBR/0/IBR/v"/>
            <OutputColumn id="4" quantity="CG_LTS/0/LTS/v"/>
        </OutputFile>

    </Component>

</Lems>
