<?xml version="1.0" encoding="UTF-8"?>
<neuroml xmlns="http://www.neuroml.org/schema/neuroml2" xmlns:xsi="http://www.w3.org/2001/XMLSchema-instance" xsi:schemaLocation="http://www.neuroml.org/schema/neuroml2  https://raw.githubusercontent.com/NeuroML/NeuroML2/development/Schemas/NeuroML2/NeuroML_v2beta4.xsd" id="network_PospischilEtAl2008">

    <include href="../../channels/Kd_CML.channel.nml"/>
    <include href="../../channels/Km_CML.channel.nml"/>
    <include href="../../channels/LeakConductance.channel.nml"/>
    <include href="../../channels/Na_CML.channel.nml"/>
    <include href="FS_ModelDB.cell.nml"/>

    <pulseGenerator id="Input_1" delay="0.3s" duration="0.41s" amplitude="5.0E-10A"/>

    <network id="network_PospischilEtAl2008" type="networkWithTemperature" temperature="36.0 degC">

        <population id="CG_FS_ModelDB" component="FS_ModelDB" type="populationList" size="1">
            <instance id="0">
                <location x="361.80304" y="513.20953" z="932.99347"/>
            </instance>
        </population>

            <!--There are no synaptic connections present in the network-->

        <inputList id="Input_1" component="Input_1" population="CG_FS_ModelDB">
            <input id="0" target="../CG_FS_ModelDB/0/FS_ModelDB" destination="synapses"/>
        </inputList>

    </network>

</neuroml>
