<Lems xmlns="http://www.neuroml.org/lems/0.7.2"
    xmlns:xsi="http://www.w3.org/2001/XMLSchema-instance"
    xsi:schemaLocation="http://www.neuroml.org/lems/0.7.2 https://raw.githubusercontent.com/LEMS/LEMS/development/Schemas/LEMS/LEMS_v0.7.2.xsd">

    <Target component="sim1" reportFile="simulator.props" timesFile="time.dat"/>

    <!--Include standard NeuroML 2 ComponentType definitions-->

    <Include file="Cells.xml"/>
    <Include file="Networks.xml"/>
    <Include file="Simulation.xml"/>

    <!--   Channel/synapse files-->
    <Include file="../../channels/Kd/Kd.channel.nml"/>
    <Include file="../../channels/IM/IM.channel.nml"/>
    <Include file="../../channels/Leak/Leak.channel.nml"/>
    <Include file="../../channels/Na/Na.channel.nml"/>
    <Include file="../../channels/Ca/Ca.nml"/>
    <Include file="../../channels/IL/IL.channel.nml"/>

    <!--   Cell files-->
    <Include file="IBR.cell.nml"/>
    <!--   Network file-->
    <Include file="IBR.net.nml"/>

    <Component type="Simulation" id="sim1" length="1000.0ms" step="0.0005ms" target="network_PospischilEtAl2008">

        <Display id="CG_IBR_ModelDB_test" title="PospischilEtAl2008: IBR" xmin="-50" xmax="1050" ymin="-100" ymax="70" timeScale="1ms">
            <Line id="v" timeScale="1 ms" quantity="CG_IBR_ModelDB/0/IBR_ModelDB/v" scale="1 mV" color="#000000"/>
        </Display>

        <Display id="caConc" title="PospischilEtAl2008: [Ca2+]" xmin="0" xmax="1000" ymin="0" ymax="1e-3" timeScale="1ms">
            <Line id="caConc" timeScale="1 ms" quantity="CG_IBR_ModelDB/0/IBR_ModelDB/caConc" scale="1 mM" color="#000000"/>
        </Display>

        <OutputFile id="CG_IBR_ModelDB_v_0_0_OF" fileName="IBR.dat">
            <OutputColumn id="v" quantity="CG_IBR_ModelDB/0/IBR_ModelDB/v"/>
        </OutputFile>

        <OutputFile id="f_cai" fileName="IBR.cai.dat">
            <OutputColumn id="cai" quantity="CG_IBR_ModelDB/0/IBR_ModelDB/caConc"/>
        </OutputFile>

    </Component>

</Lems>
