<?xml version="1.0" encoding="UTF-8"?>
<channelml xmlns="http://morphml.org/channelml/schema"
    xmlns:xsi="http://www.w3.org/2001/XMLSchema-instance"
    xmlns:meta="http://morphml.org/metadata/schema"
    xsi:schemaLocation="http://morphml.org/channelml/schema http://www.neuroml.org/NeuroMLValidator/NeuroMLFiles/Schemata/v1.8.0/Level2/ChannelML_v1.8.0.xsd"
    units="Physiological Units">

    <meta:notes>ChannelML file containing a single Channel description</meta:notes>

    <channel_type name="Kd_CML">

        <status value="in_progress">
            <meta:comment>...</meta:comment>
            <meta:contributor>
                <meta:name>Padraig Gleeson</meta:name>
            </meta:contributor>
        </status>

        <meta:notes>...</meta:notes>

        <meta:authorList>
            <meta:modelTranslator>
                <meta:name>Padraig Gleeson</meta:name>
                <meta:institution>UCL</meta:institution>
                <meta:email>p.gleeson - at - ucl.ac.uk</meta:email>
            </meta:modelTranslator>
        </meta:authorList>

        <meta:publication>
            <meta:fullTitle>....</meta:fullTitle>
            <meta:pubmedRef>...</meta:pubmedRef>
        </meta:publication>

        <meta:neuronDBref>
            <meta:modelName>K channels</meta:modelName>
            <meta:uri>http://senselab.med.yale.edu/senselab/NeuronDB/channelGene2.htm#table3</meta:uri>
        </meta:neuronDBref>

        <parameters>
            <parameter name="VT" value ="-61.5"/>
        </parameters>

        <current_voltage_relation cond_law="ohmic" ion="k" default_gmax="5" default_erev="-90">

            <gate name="n" instances="4">
                <closed_state id="n0"/>
                <open_state id="n"/>

                <!--
                <transition name="alpha" from="n0" to="n" expr_form="exp_linear" rate="0.1" scale="10" midpoint="-55"/>
                <transition name="beta" from="n" to="n0" expr_form="exponential" rate="0.125" scale="-80" midpoint="-65"/>-->

                <transition name="alpha" from="n0" to="n" expr_form="generic" expr="-0.032 * ( (v - VT) - 15 ) / (exp(-1*( (v - VT) - 15 ) / 5) - 1)"/>
                <transition name="beta" from="n" to="n0" expr_form="generic" expr="0.5 * exp(-1*( (v - VT) - 10 ) / 40)"/>

            </gate>
        </current_voltage_relation>

    </channel_type>
</channelml>
